###### DFE Method to compute Particle distribution under pressure #######
# Run with mpirun /home/jmv8431/sim_local/LIGGGHTS-PUBLIC/src/lmp_auto -in lmp_mr.in

#------------------General Settings for Granular Systems--------------------------------------------
atom_style      granular
atom_modify     map array
boundary        f f s
newton          off
communicate     single vel yes
processors      * * 1
units           micro
neighbor        0.1 bin
neigh_modify    every 1 delay 0 check yes
echo            both
timestep        1.e-5

variable        tarp        equal     0.45   # Target Porosity
variable        tarp1       equal     0.40   # Target Porosity
variable        tarp2       equal     0.35   # Target Porosity
#--------------------------Material Information---------------------------------------------------------
variable        Eam           equal     160e6   # Metal (Mn-DRX) [kPa] (https://doi.org/10.1007/s10832-016-0057-7)
variable        vam           equal     0.3     # Metal (Mn-DRX) [-]   (https://doi.org/10.1007/s10832-016-0057-7)

variable        Ecb           equal     35.e6   # MWCNT [kPa] (https://www.nature.com/articles/s41598-017-10279-0)
variable        vcb           equal     0.27    # MWCNT [-]   (https://www.nature.com/articles/s41598-017-10279-0)

#variable        Ecb           equal     15.e6   # Carbon (AB) [kPa] (https://advanced.onlinelibrary.wiley.com/doi/10.1002/adfm.202423877)
#variable        vcb           equal     0.20    # Carbon (AB) [-]   (https://www.azom.com/properties.aspx?ArticleID=516)

variable        Eww           equal     105.e6  # Grade 4 Titanium [kPa] (https://asm.matweb.com/search/specificmaterial.asp?bassnum=mtu040)
variable        vww           equal     0.37    # Grade 4 Titanium [-]   (https://asm.matweb.com/search/specificmaterial.asp?bassnum=mtu040)
#---------------------Generate Box----------------------------------------

# read_data        ../mesh_cnt_surface/massratio/mr3/mdl.data
# read_data        ../mesh_cnt30/massratio/mr11/mdl.data
# read_data        ../mesh_graphene/massratio/mr1/mdl.data
read_data        ../mesh_homo/massratio/mr1/mdl.data
# read_data        ../mesh_superp/massratio/mr1/mdl.data

group  ag   type  1
group  ac   type  2
group  ptc  type  1 2
group  ww   type  3

#---------------------Assign Material Properties to particle and wall----------------------------------------
fix     m1 all property/global youngsModulus peratomtype ${Eam} ${Ecb} ${Eww}
fix     m2 all property/global poissonsRatio peratomtype ${vam} ${vcb} ${vww}

# Coefficient of restitution matrix (3x3)
variable        cor_all       equal     0.4     # Same for all pairs
fix     m3 all property/global coefficientRestitution peratomtypepair 3 &
        ${cor_all} ${cor_all} ${cor_all} &
        ${cor_all} ${cor_all} ${cor_all} &
        ${cor_all} ${cor_all} ${cor_all}

# Coefficient of friction (3x3)
variable        cof_all       equal     0.4     # Same for all pairs
fix     m4 all property/global coefficientFriction peratomtypepair 3 &
        ${cof_all} ${cof_all} ${cof_all} &
        ${cof_all} ${cof_all} ${cof_all} &
        ${cof_all} ${cof_all} ${cof_all}

# Coefficient of rolling friction (3x3)
variable        corf_all      equal     0.4     # Same for all pairs
fix     m5 all property/global coefficientRollingFriction peratomtypepair 3 &
        ${corf_all} ${corf_all} ${corf_all} &
        ${corf_all} ${corf_all} ${corf_all} &
        ${corf_all} ${corf_all} ${corf_all}

# Cohesion energy density (3x3) Units (KPa) 50000 is 50,000 kPa
#fix     m6 all property/global cohesionEnergyDensity peratomtypepair 3 &
#        50000   3.5e6    0 &
#        3.5e6   3.5e6    0 &
#        0       0        0

fix     m6 all property/global cohesionEnergyDensity peratomtypepair 3 &
        50000   100000    0 &
        100000  100000    0 &
        0       0         0

#Define pair style
pair_style gran model hertz tangential history cohesion sjkr
pair_coeff      * *

fix xwalls1 ptc wall/gran model hertz tangential history primitive type 3 xplane 0
fix xwalls2 ptc wall/gran model hertz tangential history primitive type 3 xplane 15
fix ywalls1 ptc wall/gran model hertz tangential history primitive type 3 yplane 0
fix ywalls2 ptc wall/gran model hertz tangential history primitive type 3 yplane 15
fix zwalls1 ptc wall/gran model hertz tangential history primitive type 3 zplane 0
# Height of Z is 30.040107

#apply nve integration to all particles
fix             integr ptc nve/sphere

#------------------------Pressure Calculation------------------------------------------------------
compute        frc    ww   reduce sum fz             # Total Force on ww (top layer) in nN
variable       prs  equal  (c_frc)*4.4444e-6         # Pressure in unit of MPa on ww (15 x 15 um area)
variable       prs_atom atom v_prs                   # Create a per-atom variable that holds the value of prs

#------------------------Porosity Calculation------------------------------------------------------
compute        posw   ww   reduce ave z              # Z position of ww layer (um)

compute         rad all property/atom radius
variable        vol_atom atom (4.0/3.0)*PI*c_rad*c_rad*c_rad

compute         vol_ag ag reduce sum v_vol_atom    # Total volume of type 1 (metal)
compute         vol_ac ac reduce sum v_vol_atom    # Total volume of type 2 (CNT)

variable        Vbox   equal 225.0*c_posw          # um^3 Box volume: A_base * z_height, where z_height = mean z of type 3 (top wall)
variable        Vsolid equal c_vol_ag+c_vol_ac     # um^3

variable        poro   equal 1.0-(v_Vsolid/v_Vbox) # Porosity = 1 - V_solid / V_box
variable        poro_atom atom v_poro              # Create a per-atom variable that holds the value of poro

# Warn if timestep > 10% of Rayleigh time or 10% of Hertz time
fix             ts_check all check/timestep/gran 500 0.2 0.1 warn no

variable       ts_rayleigh equal f_ts_check[1]
variable       ts_hertz    equal f_ts_check[2]
variable       ts_skin     equal f_ts_check[3]

thermo_style    custom dt step atoms ke vol v_prs v_poro c_posw v_ts_rayleigh v_ts_hertz v_ts_skin
thermo          1000
thermo_modify   lost ignore norm no

# Output to file
dump    dmp all custom 5000 post/cnt_homo_pr35_mr3.dump id type x y z vx vy vz fx fy fz omegax omegay omegaz radius mass v_prs_atom v_poro_atom
# dump    dmp all custom 20000 post/cnt30_mr11_pck3d6.dump id type x y z vx vy vz fx fy fz omegax omegay omegaz radius mass
# dump    dmp all custom 5000 post/graphene_mr1_pck200.dump id type x y z vx vy vz fx fy fz omegax omegay omegaz radius mass
# dump    dmp all custom 5000 post/homo_mr1_pck200.dump id type x y z vx vy vz fx fy fz omegax omegay omegaz radius mass
# dump    dmp all custom 5000 post/superp_mr1_pck200.dump id type x y z vx vy vz fx fy fz omegax omegay omegaz radius mass

#------------------------Stabalize Partciles After Read------------------------------------------------------
# run 1000
# quit

#------------------------Compaction Process------------------------------------------------------
# Start (z=30.0), End (z = 5.5), dt = 1.e-5
fix 1 ww move linear 0 0 -20
run 122500

# Start Checking For Porosity 0.45 (Check every 0.2 um, Smallest Particle Radius is 0.05)
label loop1
  if "${poro} <= ${tarp}" then "jump SELF loop2a"

  run 1000
jump SELF loop1

label loop2a
timestep 1.e-6
fix 1 ww move linear 0 0 -10

# Start Checking For Porosity 0.40 (Check every 0.1 um)
label loop2
  if "${poro} <= ${tarp1}" then "jump SELF loop3a"

  run 10000
jump SELF loop2

label loop3a
timestep 1.e-7
fix 1 ww move linear 0 0 -10

# Start Checking For Porosity 0.35 (Check every 0.05 um)
label loop3
  if "${poro} <= ${tarp2}" then "jump SELF loop4"

  run 50000
jump SELF loop3

label loop4
fix 1 ww move linear 0 0 0
run 10000

# Save compacted state (Aprox. 2.5-hrs to run with 64 procs)
# write_data      ../mesh_cnt30/massratio/mr11/mdl_pck3d6.data
# write_data      ../mesh_graphene/massratio/mr1/mdl_pck200.data
# write_data      ../mesh_homo/massratio/mr1/mdl_pck200.data
# write_data      ../mesh_superp/massratio/mr1/mdl_pck200.data
