// COMSOL Multiphysics 6.3.0.254 model "diffuse_double_layer.mph"
// Diffuse Double Layer
// This example is an extension of the Diffuse Double Layer model and demonstrates how to incorporate charge transfer in a diffuse double layer described by the coupled Nernst–Planck–Poisson set of equations.
// Outline of the model tree

Parameters
  T0 = 25[degC]  // Temperature
  V_therm = R_const*T0/F_const  // Thermal voltage
  DA = 1e-9[m^2/s]  // Diffusion coefficient, cation
  DX = DA  // Diffusion coefficient, anion
  cA_bulk = 10[mol/m^3]  // Bulk cation concentration
  cX_bulk = cA_bulk  // Bulk anion concentration
  zA = +1  // Cation charge
  zX = -1  // Anion charge
  Istr_bulk = 0.5*((zA^2+zX^2)*cA_bulk)  // Bulk ionic strength
  eps_H2O = 78.5  // Relative permittivity of water
  xD = sqrt(epsilon0_const*eps_H2O*V_therm/(2*F_const*Istr_bulk))  // Debye length
  xS = 0.2[nm]  // Stern layer thickness
  L_cell = xD*10  // Cell length
  h_max = L_cell/20  // Maximum mesh element size
  h_max_surf = xD/100  // Maximum mesh element size (electrode)
  Cd_GCS = epsilon0_const/(xD/eps_H2O+xS/eps_S)  // Capacitance per unit area (GCS theory, low potential limit)
  phiM = 1[mV]  // Voltage of electrode vs PZC
  eps_S = 10  // Relative permittivity of Stern layer

Variables
  var1 "Variables 1"
    deltaphi = phiM-phi  // Electrode-OHP potential difference
    rho_surf = epsilon0_const*eps_S*deltaphi/xS  // Surface charge density

Geometry
  geom1 "Geometry 1" (1D, length unit m)
    i1: Interval | coord = {0, L_cell}
    fin: Finalize "Form Union"

Physics
  es: Electrostatics on all domains
    dependent variable phi
    fsp1: FreeSpace (default)
    zc1: ZeroCharge (default)
    init1: init "Initial Values 1" (default)
    ccnf1: ChargeConservationFluid "Charge Conservation in Fluids 1" on all domains
      epsilonr_mat = userdef
      epsilonr = eps_H2O
    sfcd1: SurfaceChargeDensity on boundaries 1 | rhoqs = rho_surf
    gnd1: Ground on boundaries 2
  tds: DilutedSpecies "Transport of Diluted Species" on all domains
    dependent variable cA = {cA, cX}
    ShapeProperty.order_concentration = 2
    TransportMechanism.Convection = 0
    TransportMechanism.Migration = 1
    sp1: SpeciesProperties "Species Charges" (default) | z = {zA, zX}
    cdm1: Fluid (default) | D_cA = DA; D_cX = DX
    nflx1: NoFlux (default)
    init1: init "Initial Values 1" (default) | initc = {cA_bulk, cX_bulk}
    conc1: Concentration on boundaries 2 | species = {1, 1}; c0 = {cA_bulk, cX_bulk}

Multiphysics
  pc1: PotentialCoupling on all domains | PotentialSource_physics = es; PotentialDestination_physics = tds
  scdc1: SpaceChargeDensityCoupling on all domains
    SpaceChargeDensitySource_physics = tds
    SpaceChargeDensityDestination_physics = es

Mesh
  mesh1 "Mesh 1"
    size: MeshSizeDefault | hmax = 2.04E-9; hmin = 9.13E-12; hcurve = 0.3; hgrad = 1.3
    edg1: Edge on remaining entities
      size1: Size on entire geometry | hmax = h_max; custom = on
      size2: Size on boundaries 1 | hmax = h_max_surf; custom = on

Studies
  std1 "Study 1"
    stat: Stationary | useparam = on; pname = phiM; plistarr = range(1,1,10); punit = mV

Solver configurations
  sol1 "Solution 1" (study std1)
    v1: Variables "Dependent Variables 1"
    s1: Stationary "Stationary Solver 1"
      p1: Parametric
      fc1: FullyCoupled
      d1: Direct "Direct (Merged)"

Datasets
  dset1: Solution | solution = sol1

Plots
  pg1: PlotGroup1D "Electric Potential (es)" | data = dset1; ylabel = Electric potential (V)
    lngr1: LineGraph on domains 1 | expr = phi; xdata = expr; xdataexpr = x/xD; legends = Phi
    ptgr1: PointGraph on boundaries 1 | expr = phiM; xdata = expr; xdataexpr = x/xD; legends = PhiM
  pg2: PlotGroup1D "Concentrations, All Species (tds)" | data = dset1
    lngr1: LineGraph "Species A" on domains 1
      expr = cA
      descr = Concentration
      xdata = expr
      xdataexpr = x
      autosolution = off
      legends = A<sup>+</sup> Concentration
    lngr2: LineGraph "Species X" on domains 1
      expr = cX
      descr = Concentration
      xdata = expr
      xdataexpr = x
      autosolution = off
      legends = X<sup>-</sup> Concentration
  pg3: PlotGroup1D "Concentration, A (tds)" | data = dset1; typeintitle = off
    lngr1: LineGraph on domains 1 | expr = cA; xdata = expr; xdataexpr = x
      col1: Color "Color Expression 1" | expr = phiM
  pg4: PlotGroup1D "Concentration, X (tds)" | data = dset1; typeintitle = off
    lngr1: LineGraph on domains 1 | expr = cX; xdata = expr; xdataexpr = x
      col1: Color "Color Expression 1" | expr = phiM
  pg5: PlotGroup1D "Surface Charge Density" | data = dset1; ylabel = Charge density (C/m<sup>2</sup>)
    ptgr1: PointGraph on boundaries 1
      expr = rho_surf
      xdata = expr
      xdataexpr = phiM
      legends = Surface charge density (simulation)
    glob1: Global | expr = Cd_GCS*phiM; descr = Surface charge density (theory); xdata = expr; xdataexpr = phiM