// COMSOL Multiphysics 6.3.0.254 model "diffuse_double_layer_with_charge_transfer.mph"
// Diffuse Double Layer with Charge Transfer
// At the electrode–electrolyte interface, there is a thin layer of space charge, called the diffuse double layer. In this region, electroneutrality does not hold. The double layer may be of interest when modeling devices such as electrochemical supercapacitors and nanoelectrodes.
// The Diffuse Double Layer tutorial shows you how to couple the Nernst–Planck equations to the Poisson equation in order to describe a diffuse double layer according to the Gouy–Chapman–Stern model.
// The simulation application extends the simple example by including two electrodes. It also considers Faradaic (charge transfer) electrode reactions. An additional equation is solved to ensure overall conservation of charge.
// Outline of the model tree

Parameters
  epsilon = 0.001  // Dimensionless Debye length scale
  L = lambdaD/epsilon  // Cell length
  Dp = 1e-9[m^2/s]  // Diffusion coefficient, positive ion
  T = 298.15[K]  // Temperature
  RT = R_const*T  // Molar gas constant * Temperature
  Dm = Dp  // Diffusion coefficient, negative ion
  cref = 1[mol/m^3]  // Reference ion concentration
  cM = 1[mol/m^3]  // Metal reference concentration
  Z_ch = 1  // Ion charge
  alphac = 0.5  // Cathodic charge transfer coefficient
  alphaa = 1-alphac  // Anodic charge transfer coefficient
  jr = 10  // Dimensionless anodic reaction current density
  kc = 10  // Dimensionless cathodic rate coefficient
  delta = 0.025  // Dimensionless Stern layer thickness
  J = 0.9  // Dimensionless cell current density
  Kc = kc*4*Dp/L  // Cathodic rate constant
  Ka = jr*4*Dp*cref/(L*cM)  // Anodic rate constant
  id = 4*Z_ch*F_const*Dp*cref/L  // Nernst limiting current density
  icell = J*id  // Cell current density
  lambdaD = sqrt(epsilon0_const*eps_H2O*RT/(2*Z_ch^2*F_const^2*cref))  // Debye length
  lambdaS = delta*lambdaD  // Stern layer thickness
  eps_H2O = 78.5  // Relative permittivity of water
  eps_S = 10  // Relative permittivity of Stern layer

Variables
  var1 "Variables 1"
    deltaphi = tcd.phisext-phil  // Metal - reaction plane potential difference
    rho_s = epsilon0_const*eps_S*deltaphi/lambdaS  // Surface charge density

Couplings
  intop1: Integration on domains 1

Geometry
  geom1 "Geometry 1" (1D, length unit m)
    i1: Interval | coord = {0, L}
    fin: Finalize "Form Union"

Physics
  tcd: TertiaryCurrentDistributionNernstPlanck on all domains
    dependent variable cp = {cp, cm}
    SpeciesProperties.ChargeTransportModel = Poisson
    sp1: SpeciesProperties "Species Charges 1" (default) | z = {Z_ch, -Z_ch}
    ice1: Electrolyte (default) | D_cp = Dp; D_cm = Dm
    nflx1: NoFlux (default)
    ein1: ElectricInsulation "Insulation 1" (default)
    init1: init "Initial Values 1" (default) | initc = {cref, cref}
    es1: ElectrodeSurface on boundaries 1
      er1: ElectrodeReaction (default)
        Vi0 = {-1, 0}
        Eeq_mat = userdef
        Eeq = 0
        ElectrodeKinetics = ConcentrationDependentKinetics
        i0 = Ka*F_const*cM*Z_ch
        alphaa = alphaa*Z_ch
        alphac = alphac*Z_ch
        CO = Kc/Ka*cp/cM
    es2: ElectrodeSurface on boundaries 2 | BoundaryCondition = AverageCurrentDensity; Ial = icell
      er1: ElectrodeReaction (default)
        Vi0 = {-1, 0}
        Eeq_mat = userdef
        Eeq = 0
        ElectrodeKinetics = ConcentrationDependentKinetics
        i0 = Ka*F_const*cM*Z_ch
        alphaa = alphaa*Z_ch
        alphac = alphac*Z_ch
        CO = Kc/Ka*cp/cM
    sfcd1: SurfaceChargeDensity on all boundaries | rhos = rho_s
    gconstr1: GlobalConstraint | constraintExpression = intop1(cm)-(cref*L)

Mesh
  mesh1 "Mesh 1"
    size: MeshSizeDefault | hmax = 6.45E-9; hmin = 2.89E-11; hcurve = 0.3; hgrad = 1.3
    edg1: Edge on remaining entities
      size1: Size on entire geometry | hmax = L/20; custom = on
      size2: Size on all boundaries | hmax = lambdaD/10; custom = on

Studies
  std1 "Study 1"
    param: Parametric "Parametric Sweep" | pname = epsilon; plistarr = 0.001 0.01 0.1
    stat: Stationary

Solver configurations
  sol1 "Solution 1" (study std1)
    v1: Variables "Dependent Variables 1"
    s1: Stationary "Stationary Solver 1"
      fc1: FullyCoupled
      d1: Direct "Direct (tcd)"
  sol2 "Parametric Solutions 1" (study std1)

Datasets
  dset1: Solution | solution = sol1
  dset2: Solution | solution = sol2

Plots
  pg1: PlotGroup1D "Dimensionless concentration" | data = dset2
    lngr1: LineGraph on domains 1 | expr = (cp+cm)/(2*cref); xdata = expr; xdataexpr = x/L
  pg2: PlotGroup1D "Dimensionless charge density" | data = dset2
    lngr1: LineGraph on domains 1 | expr = (cp-cm)/(2*cref); xdata = expr; xdataexpr = x/L
  pg3: PlotGroup1D "Dimensionless potential" | data = dset2
    lngr1: LineGraph on domains 1 | expr = phil*Z_ch*F_const/(R_const*T); xdata = expr; xdataexpr = x/L